*Heading
 gmsh_test_12.inp
*NODE
1, -1.6333150863647, 0.94178783893585, 2.3782620429993
2, -1.6333150863647, -0.83260577917099, 2.3782620429993
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******* E L E M E N T S *************
*ELEMENT, type=C3D20, ELSET=Volume1301
33, 937, 1053, 2743, 2562, 1039, 1187, 2746, 2744, 1665, 3565, 3566, 3564, 1663, 3570, 3571,
3569, 1610, 1666, 3567, 3568
34, 1053, 912, 2561, 2743, 1187, 1051, 2745, 2746, 1667, 3572, 3573, 3565, 1664, 3575, 3576,
3570, 1666, 1659, 3574, 3567
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*ELSET,ELSET=VOLUME
33, 34, 35, 36, 37, 38
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*NSET,NSET=NODES
1, 2, 3, 4, 5, 6
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*NSET,NSET=TABLE_TOP
5, 6, 8, 14,
*NSET,NSET=LEG_BOTTOMS
4, 7, 11, 13, 16, 19, 23, 24, 25, 26,
27, 28, 29, 30, 31, 32,
*NSET,NSET=VOLUME
1, 2, 3, 4, 5, 6
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
*MATERIAL, NAME=TableMaterial
*ELASTIC, TYPE=ISO
30000, 0.3

*SOLID SECTION,MATERIAL=TableMaterial,ELSET=VOLUME

*BOUNDARY, FIXED
LEG_BOTTOMS,1,3

*STEP,INC=1000,NLGEOM=YES
*STATIC

*DLOAD
VOLUME, P1, -100

*NODE FILE,GLOBAL=YES, NSET=VOLUME
RF,U

*EL FILE,GLOBAL=YES, VOLUME
ME,S

*END STEP
